include src/common.ini

# getting datetime data for naming files
if "$(is_defined(variable, file_name) == 0)" then &
  "shell date +%Y-%m-%d_%H-%M > timestamp.tmp"    &
  "variable timestamp file timestamp.tmp"         &
  "shell rm timestamp.tmp"                        &
  "variable file_name string equilibration.${timestamp}"

# logging results
log logs/equilibrations/${file_name}.log
shell rm log.lammps

# if atom file name is not given, get the last modified one
if "$(is_defined(variable, atom_file) == 0)" then &
  "shell ls -t atoms.* | head -1 > atom_file.tmp" &
  "variable atom_file file atom_file.tmp"         &
  "shell rm atom_file.tmp"

read_data ${atom_file}
print "reading data from ${atom_file}"

# ---                      --- #
# --- system configuration --- #
# ---                      --- #

mass 1 ${al_mass}
mass 2 ${mg_mass}

pair_style eam/fs                      # Finnis-Sinclair format Embedded Atom Method
pair_coeff * * ${potential_almg} Al Mg # 1-1, 1-2, 2-2, where 1=Al, 2=Mg (because the potential file is made this way)

# --- dividing into regions --- #

region top_region block INF                  INF &
                        $(ly-v_layer_thresh) INF &
                        INF                  INF units box

region bot_region block INF INF            &
                        INF v_layer_thresh &
                        INF INF            units box

group top_layer region top_region                # moving rigid top layer
group bot_layer region bot_region                # static rigid bottom layer
group mobile    subtract all top_layer bot_layer # mobile middle layer (just atoms)

# adding Mg atoms to the system
# NOTE: do not replace atoms in the dislocation core?
set type 1 type/fraction 2 ${mg_frac} 12345

# adding vacancies to the system
# NOTE: do not remove atoms from the dislocation core?
group al_group  type      1
group al_mobile intersect al_group mobile
delete_atoms random fraction ${vac_frac} yes al_mobile NULL 34567
reset_atoms  id

# default values (used if values below are not uncommented)
#neighbor 2.0 bin
#neigh_modify delay 0 every 1 check yes

# performance tuned
#neighbor 2.0 bin
#neigh_modify delay 10 every 2 check yes

# stability tuned (set if "Dangerous builds" != 0)
#neighbor 3.0 bin
#neigh_modify delay 0 every 1 check yes

# ---                                --- #
# --- STEP 1: minimize system energy --- #
# ---                                --- #

timestep ${eq_run_timestep}

compute pot_energy  all    pe/atom
compute stress      all    stress/atom NULL
compute mobile_temp mobile temp             # temperature of moving atoms only

thermo        ${eq_dump_freq}
thermo_modify temp mobile_temp
thermo_style  custom step temp fnorm fmax lx ly lz # pxx pyy pzz pxy pyz pxz

dump 1 all custom ${eq_dump_freq} &
     dumps/equilibrations/${file_name}.atom  &
     id type x y z # c_pot_energy c_stress[1] c_stress[2] c_stress[3] c_stress[4] c_stress[5] c_stress[6]

print "###                   ###"
print "## energy minimization ##"
print "###                   ###"

min_style fire

min_modify dmax 0.0005 vdfmax 20000
minimize 0.0 1.0e-3 5000 50000

min_modify dmax 0.001 vdfmax 20000
minimize 0.0 1.0e-4 20000 200000

min_modify dmax 0.01 vdfmax 20000
minimize 0.0 1.0e-6 20000 200000

# ---                           --- #
# --- temperature equilibration --- #
# ---                           --- #

# boundary conditions
fix TOPFIX top_layer setforce 0.0 0.0 NULL
fix BOTFIX bot_layer setforce 0.0 0.0 NULL
velocity top_layer set 0.0 0.0 0.0
velocity bot_layer set 0.0 0.0 0.0

# initialize atom velocities
velocity mobile create ${desired_temp} 34567 units box dist gaussian loop all mom yes rot yes
#velocity mobile zero   linear
#velocity mobile zero   angular

# equilibrate the temperature
fix EQ mobile npt temp ${desired_temp} ${desired_temp} 0.5 &
                  x 0.0 0.0 2.0 &
                  z 0.0 0.0 2.0 &
                  couple none

# consider only the temperature of mobile atoms
fix_modify EQ temp mobile_temp

print "###                         ###"
print "## temperature equilibration ##"
print "###                         ###"

run ${eq_run_steps}

unfix EQ

fix SEG mobile nvt temp ${desired_temp} ${desired_temp} 0.5
fix_modify SEG temp mobile_temp

print "###                  ###"
print "## Mg segregation run ##"
print "###                  ###"

run ${seg_run_steps}

unfix SEG
unfix TOPFIX
unfix BOTFIX

write_restart restarts/equilibrations/${file_name}.restart
